<?xml version="1.0"?>
<!--
  File:     pa28-236-engine.xml
  Author:   Aero-Matic v 0.82

  Inputs:
    name:           pa28-236-engine
    type:           piston
    power:          235 hp
    augmented?      no
    injected?       no

  Sources:
    http://en.wikipedia.org/wiki/Lycoming_O-540
-->

<piston_engine name="pa28-236-engine">
  <minmp unit="INHG">          6.0 </minmp>
  <maxmp unit="INHG">         28.5 </maxmp>
  <displacement unit="IN3"> 541.50 </displacement>
  <maxhp>        235.00 </maxhp>
  <cycles>         4.0 </cycles>
  <idlerpm>      700.0 </idlerpm>
  <maxrpm>      2400.0 </maxrpm>
  <maxthrottle>    1.0 </maxthrottle><!-- Deprecated -->
  <minthrottle>    0.1 </minthrottle><!-- Deprecated -->
  <sparkfaildrop>  0.1 </sparkfaildrop>
  <volumetric-efficiency> 0.85 </volumetric-efficiency>
<!-- Optional items that affect engine performance -->
 <!-- Defining <bsfc> over-rides the built-in horsepower calculations -->
 <!--<bsfc>           0.45 </bsfc>-->
 <stroke unit="IN">  4.375  </stroke>
 <bore unit="IN">    5.125 </bore>
 <cylinders>         6.0  </cylinders>
 <compression-ratio> 8.5 </compression-ratio>
</piston_engine>
